// *************************************
//               AnyMoCap
// *************************************


// Enter and edit Lab-Specific Data in this file:
#path MOCAP_LAB_SPECIFIC_DATA "Setup/LabSpecificData.any"


// Enter and edit Subject-Spcific Data in this file:
#path MOCAP_SUBJECT_SPECIFIC_DATA "Setup/SubjectSpecificData.any"


// Enter and edit Trial Specific Data in this file:
#path MOCAP_TRIAL_SPECIFIC_DATA "Setup/TrialSpecificData.any"


// Creates the Model - no need to edit
#include "../../Model/AnyMocapModel.any"


// Creates the Model - no need to edit
#define LLJ_HIPMODEL_MODELSETUP  2
#include "../../../ADL/LLJ_Hip/LLJHip.Include.any"
