Main.ModelSetup.TrialSpecificData =
{
  // This is the name of the trial c3d file without extension.
  // Here we assume the c3d file has the same name as the mainfile directory.
  TrialFileName = MOCAP_NAME_MAINFILEDIR;

  // This the C3D frame where the analysis starts
  // If not specified it defaults to the first frame of the C3D file
  FirstFrame = 0 + 2000;

  // This the C3D frame where the analysis ends
  // If not specified it defaults the first frame of the C3D file
  LastFrame = (.BVHFileData.Header.FramesNo - 1) - 1197;

  // tStart specifies the time of the analysis. Setting this overrides
  // the 'FirstFrame' value
  //tStart = FirstFrame * .BVHFileData.Header.FrameTime;

  // tEnd specifies the tEnd time of the analysis. Setting this overrides
  // the 'LastFrame' value
  //tEnd = LastFrame * .BVHFileData.Header.FrameTime;

  // nStep specifies the number of steps used in the analysis.
  // If not specified it defaults to: 1+(tEnd-tStart)*C3D_video_frame_rate
  nStep = 10;//LastFrame - FirstFrame + 1;


  // The switch MOCAP_C3D_DATA_PATH can be used to specify the directory
  // where the C3D file is stored. Defaults to the main file directory.
  // #path MOCAP_C3D_DATA_PATH "<MOCAP_PATH_MAINFILEDIR>"

  // The switch MOCAP_OUTPUT_FILENAME_PREFIX can be used to specify
  // a prefix to all output files. Useful in some cases
  // to differentiate trials. Defautls to nothing ""
  //#define MOCAP_OUTPUT_FILENAME_PREFIX ""


   // This class_template calculates the load time position and orientation of
   // the pelvis based on markers.
   //AutoPelvisPos AutoPos(RASIS=RASI, LASIS=LASI, BACK=RPSI) = {};

  /// The following settings define the initial posture of the
  /// model (e.g. at load time)
  InitialPositionOfBody= {

//    // This can be ommitted if AutoPelvisPos above is used.
//    PelvisPosX = Main.ModelSetup.BVHFileData.Model.Hips.Seg.r0[0];
//    PelvisPosY = Main.ModelSetup.BVHFileData.Model.Hips.Seg.r0[1];
//    PelvisPosZ = Main.ModelSetup.BVHFileData.Model.Hips.Seg.r0[2];
//
//    PelvisRotX = 0.0;
//    PelvisRotY = -90.0;
//    PelvisRotZ = 0.0;

    //AnyFloat PelvisRotMatrix= Main.ModelSetup.BVHFileData.Model.Hips.Seg.Axes0 ;
    PelvisRotationMatrix = RotMat(
    Main.ModelSetup.BVHFileData.Model.Hips.Seg.r0,
    Main.ModelSetup.BVHFileData.Model.Hips.Chest.Seg.r0,
    Main.ModelSetup.BVHFileData.Model.Hips.RightHip.Seg.r0
    ) * RotMat(-pi/2, x) * RotMat(-pi/2, z);

    PelvisPos = Main.ModelSetup.BVHFileData.Model.Hips.Seg.r0;

    PelvisThoraxExtension = 0;
    PelvisThoraxLateralBending = 0;
    PelvisThoraxRotation = 0;

    NeckExtension = 0;
    NeckLateralBending = 0;
    NeckRotation = 0;

    Right = {

      HipFlexion = 0;
      HipAbduction = 5;
      HipExternalRotation = 0;
      KneeFlexion = 5;
      AnklePlantarFlexion = 5;
      SubTalarEversion = 0;

////    These Values are configure from the SubjectSpecificData.any
////    since it is shared by all trials
//      GlenohumeralFlexion = 0;
//      GlenohumeralAbduction = 0;
//      GlenohumeralExternalRotation = 0;
//      ElbowFlexion = 0;
//      ElbowPronation = 0;
//      WristFlexion = 0;
//      WristAbduction = 0;

  };
    Left = {

      HipFlexion = 0;
      HipAbduction = 5;
      HipExternalRotation = 0;
      KneeFlexion = 5;
      AnklePlantarFlexion = 5;
      SubTalarEversion = 0;

////    These Values are configure from the SubjectSpecificData.any
////    since it is shared by all trials
//      GlenohumeralFlexion = 0;
//      GlenohumeralAbduction = 0;
//      GlenohumeralExternalRotation = 0;
//      ElbowFlexion = 0;
//      ElbowPronation = 0;
//      WristFlexion = 0;
//      WristAbduction = 0;

  };


  }; // InitialPositionOfBody

};
