Main.EnvironmentModel.ForcePlates =
{
#ifdef STANDING_REFERENCE
// Don't include forceplate in standing reference
#else
  ForcePlateAutoDetection Plate1(
    PLATE_NO=1,
    HeightTolerance = 0.07,
    VelThreshold = 2.2,
    FORCEPLATE_TYPE = 4
  ) = { };

  ForcePlateAutoDetection Plate2(
    PLATE_NO=2,
    HeightTolerance = 0.07,
    VelThreshold = 2.2,
    FORCEPLATE_TYPE = 4
  ) = { };
#endif

};
