    ForcePlateType2AutoDetection Plate1 (
    PlateName = Plate1,
    Folder =Main.ModelSetup.C3DFileData,
    Limb1=  Main.HumanModel.BodyModel.Right.Leg.Seg.Foot,
    Limb2=  Main.HumanModel.BodyModel.Left.Leg.Seg.Foot,
    No=0,
    VerticalDirection ="Z",
    HeightTolerance=0.07,
    VelThreshold=2.2,
    Fx=Main.ModelSetup.C3DFileData.Analog.DataFiltered.Fx1,
    Fy=Main.ModelSetup.C3DFileData.Analog.DataFiltered.Fy1,
    Fz=Main.ModelSetup.C3DFileData.Analog.DataFiltered.Fz1,
    Mx=Main.ModelSetup.C3DFileData.Analog.DataFiltered.Mx1,
    My=Main.ModelSetup.C3DFileData.Analog.DataFiltered.My1,
    Mz=Main.ModelSetup.C3DFileData.Analog.DataFiltered.Mz1,
    FootPresent=1)
    ={
      Switch_DrawForceVectorFromCOP = On;
    };

    ForcePlateType2AutoDetection Plate2 (
    PlateName = Plate2,
    Folder =Main.ModelSetup.C3DFileData,
    Limb1=  Main.HumanModel.BodyModel.Right.Leg.Seg.Foot,
    Limb2=  Main.HumanModel.BodyModel.Left.Leg.Seg.Foot,
    No=1,
    VerticalDirection ="Z",
    HeightTolerance=0.07,
    VelThreshold=2.2,
    Fx=Main.ModelSetup.C3DFileData.Analog.DataFiltered.Fx2,
    Fy=Main.ModelSetup.C3DFileData.Analog.DataFiltered.Fy2,
    Fz=Main.ModelSetup.C3DFileData.Analog.DataFiltered.Fz2,
    Mx=Main.ModelSetup.C3DFileData.Analog.DataFiltered.Mx2,
    My=Main.ModelSetup.C3DFileData.Analog.DataFiltered.My2,
    Mz=Main.ModelSetup.C3DFileData.Analog.DataFiltered.Mz2,
    FootPresent=1)
    ={
      Switch_DrawForceVectorFromCOP = On;
    };

    ForcePlateType2AutoDetection Plate3 (
    PlateName = Plate3,
    Folder =Main.ModelSetup.C3DFileData,
    Limb1=  Main.HumanModel.BodyModel.Right.Leg.Seg.Foot,
    Limb2=  Main.HumanModel.BodyModel.Left.Leg.Seg.Foot,
    No=2,
    VerticalDirection ="Z",
    HeightTolerance=0.07,
    VelThreshold=2.2,
    Fx=Main.ModelSetup.C3DFileData.Analog.DataFiltered.Fx3,
    Fy=Main.ModelSetup.C3DFileData.Analog.DataFiltered.Fy3,
    Fz=Main.ModelSetup.C3DFileData.Analog.DataFiltered.Fz3,
    Mx=Main.ModelSetup.C3DFileData.Analog.DataFiltered.Mx3,
    My=Main.ModelSetup.C3DFileData.Analog.DataFiltered.My3,
    Mz=Main.ModelSetup.C3DFileData.Analog.DataFiltered.Mz3,
    FootPresent=1)
    ={
      Switch_DrawForceVectorFromCOP = On;
    };

    ForcePlateType2AutoDetection Plate4 (
    PlateName = Plate4,
    Folder =Main.ModelSetup.C3DFileData,
    Limb1=  Main.HumanModel.BodyModel.Right.Leg.Seg.Foot,
    Limb2=  Main.HumanModel.BodyModel.Left.Leg.Seg.Foot,
    No=3,
    VerticalDirection ="Z",
    HeightTolerance=0.07,
    VelThreshold=2.2,
    Fx=Main.ModelSetup.C3DFileData.Analog.DataFiltered.Fx4,
    Fy=Main.ModelSetup.C3DFileData.Analog.DataFiltered.Fy4,
    Fz=Main.ModelSetup.C3DFileData.Analog.DataFiltered.Fz4,
    Mx=Main.ModelSetup.C3DFileData.Analog.DataFiltered.Mx4,
    My=Main.ModelSetup.C3DFileData.Analog.DataFiltered.My4,
    Mz=Main.ModelSetup.C3DFileData.Analog.DataFiltered.Mz4,
    FootPresent=1)
    ={
      Switch_DrawForceVectorFromCOP = On;
    };

    ForcePlateType2AutoDetection Plate5 (
    PlateName = Plate5,
    Folder =Main.ModelSetup.C3DFileData,
    Limb1=  Main.HumanModel.BodyModel.Right.Leg.Seg.Foot,
    Limb2=  Main.HumanModel.BodyModel.Left.Leg.Seg.Foot,
    No=4,
    VerticalDirection ="Z",
    HeightTolerance=0.07,
    VelThreshold=2.2,
    Fx=Main.ModelSetup.C3DFileData.Analog.DataFiltered.Fx5,
    Fy=Main.ModelSetup.C3DFileData.Analog.DataFiltered.Fy5,
    Fz=Main.ModelSetup.C3DFileData.Analog.DataFiltered.Fz5,
    Mx=Main.ModelSetup.C3DFileData.Analog.DataFiltered.Mx5,
    My=Main.ModelSetup.C3DFileData.Analog.DataFiltered.My5,
    Mz=Main.ModelSetup.C3DFileData.Analog.DataFiltered.Mz5,
    FootPresent=1)
    ={
      Switch_DrawForceVectorFromCOP = On;
    };
