AnyFolder &JntPos= Main.HumanModel.Mannequin.Posture;
AnyFolder &JntVel= Main.HumanModel.Mannequin.PostureVel;


#ifdef MOCAP_IS_STANDING_REFERENCE
#if MOCAP_IS_STANDING_REFERENCE == 1
#include "ExtraDrivers_StandingReference.any"
#endif
#endif


AnyKinEqSimpleDriver SCDriverLeft ={
  AnyKinMeasureOrg &ref3 = Main.HumanModel.BodyModel.Interface.Left.SternoClavicularAxialRotation;
  DriverPos = pi/180*{
    .JntPos.Left.SternoClavicularAxialRotation
  };
  DriverVel = pi/180*{
    .JntVel.Left.SternoClavicularAxialRotation
  };
  Reaction.Type={Off};
  CType = {Soft};
  AnyFolder Weight = { AnyFunConst fun =  { Value ={0.005}; }; };
  WeightFun = {&Weight.fun};
};
AnyKinEqSimpleDriver SCDriverRight ={
  AnyKinMeasureOrg &ref3 = Main.HumanModel.BodyModel.Interface.Right.SternoClavicularAxialRotation;
  DriverPos = pi/180*{
    .JntPos.Right.SternoClavicularAxialRotation
  };
  DriverVel = {
    .JntVel.Right.SternoClavicularAxialRotation
  };
  Reaction.Type={Off};
  CType = {Soft};
  AnyFolder Weight = { AnyFunConst fun =  { Value ={0.005}; }; };
  WeightFun = {&Weight.fun};
};
