#path MOCAP_TRIAL_SPECIFIC_DATA "TrialSpecificData.any"
#path MOCAP_MARKER_PROTOCOL_FILE "MarkerProtocol.any"

#define EXCLUDE_OPTIMIZED_DRIVERS

#ifndef ANYMOCAP
#path ANYMOCAP "../../Model/AnyMocapModel.any"
#endif

#include "<ANYMOCAP>"


Main = {

  ModelSetup.MocapDrivers = {

    CreateMarkerDriver LTHI (
      MarkerName= LTHI ,
      MarkerPlacement=Left.Leg.Seg.Thigh,
      WeightX=1.0,WeightY=1.0,WeightZ=1.0)
     = { sRelOpt = {0.0, -0.28, -0.1}; };

   };

// Override the weight definition of a specific marker
ModelSetup.MocapDrivers.LTHI = {ConstMarkerWeightX=0;};


// Using the C3D residuals as weights
ModelSetup.C3DFileData.ConstructWeightFunUsingResidualOnOff  = On;

  ModelSetup.MocapDrivers = {

      CreateMarkerDriver LKNE (
          MarkerName= LKNE ,
          MarkerPlacement=Left.Leg.Seg.Thigh,
          UseC3DWeightResiduals  = "On"
      ) = {  sRelOpt = {0.00, -0.3982615, -0.06503701};  };

   };


// Overiding all other settings, to use an arbitrary interpolation
// function as weights
  ModelSetup.MocapDrivers.RKNE = {
    MarkerWeightsPtr = &Main.ModelSetup.C3DFileData.Points.Markers.RKNE.Weight;
  };

};
