//AnyInputC3D
Main.ModelSetup.C3DFileData = {

   FileName = MOCAP_C3D_DATA_PATH +"/"+ Main.ModelSetup.TrialSpecificData.TrialFileName + ".c3d"; //add the extension to the file name here
   ConstructModelOnOff = Off;
   ConstructChartOnOff = Off;

   MarkerUseAllPointsOnOff = On;
   MarkerUseCamMaskOnOff = Off;
   PointsScaleFactor = 1/1000;
   MarkerDrawOnOff = On;

   AnyInt MarkerFilterOrder = 2;
   AnyInt AnalogFilterOrder = 2;

   // HACK_WORKAROUND. We need to disable filters (i.e. set FilterIndex to -1) when
   // using recordings which has less data than 3 times filter order
//   MarkerFilterIndex = iffun(gtfun(Header.LastFrameNo-Header.FirstFrameNo+1,MarkerFilterOrder *3 ), 0 ,-1) ;
//   AnalogFilterIndex = iffun(gtfun((Header.LastFrameNo-Header.FirstFrameNo+1)*Header.NoAnalogSamplesPer3DFrame,
//                                    AnalogFilterOrder *3 ), 1 ,-1);
//

   MarkerFilterIndex = 0;
   AnalogFilterIndex = 1;

Filter.FilterForwardBackwardOnOff = Off;
                                    MarkerBsplineOrder = 4;

   Filter =  {
     N = .MarkerFilterOrder;
     Fc = {5};
     Type = LowPass;
   };

   /// This filter is used for the analog data
   AnyFunButterworthFilter LowPassFilter = {
     FilterForwardBackwardOnOff = Off;
     AutomaticInitialConditionOnOff = On;
     N = .AnalogFilterOrder  ;
     AnyVar CutOffFrequency=12;
     AnyVar SampleFreq=.Header.VideoFrameRate* .Header.NoAnalogSamplesPer3DFrame   ;
     W = {1/(iffun(eqfun(SampleFreq,0),100.0,SampleFreq)*0.5)*CutOffFrequency};
     Type = LowPass;
   };

   MarkerScaleXYZ = 0.015*{1,1,1};
   MarkerRGB={0,0,1};


};
