//AnyInputC3D
Main.ModelSetup.C3DFileData = {

   FileName = MOCAP_C3D_DATA_PATH +"/"+ Main.ModelSetup.TrialSpecificData.TrialFileName + ".c3d"; //add the extension to the file name here

   ConstructModelOnOff = Off;
   ConstructChartOnOff = Off;
   GapFillUsingResidualsOnOff = On;

   //#if ANYBODY_V1 >= 7
   GapFillUsingResidualsOnOff = On;
   //#endif

   MarkerUseAllPointsOnOff = On;
   MarkerUseCamMaskOnOff = Off;
   PointsScaleFactor = 1/1000;
   MarkerDrawOnOff = On;

   AnyInt MarkerFilterOrder = 2;
   AnyInt AnalogFilterOrder = 2;

   MarkerFilterIndex = 0;
   AnalogFilterIndex = 1;

   MarkerBsplineOrder = 4;

   Filter =  {
     N = .MarkerFilterOrder;
     Fc = {5};
     Type = LowPass;
   };

   /// This filter is used for the analog data
   AnyFunButterworthFilter LowPassFilter = {
     FilterForwardBackwardOnOff = Off;
     AutomaticInitialConditionOnOff = On;
     N = .AnalogFilterOrder  ;
     AnyVar CutOffFrequency=12;
     AnyVar SampleFreq=.Header.VideoFrameRate* .Header.NoAnalogSamplesPer3DFrame   ;
     W = {CutOffFrequency/(iffun(eqfun(SampleFreq,0),100.0,SampleFreq)*0.5)};
     Type = LowPass;
   };

   MarkerScaleXYZ = 0.015*{1,1,1};
   MarkerRGB={0,0,1};


};
