Main.EnvironmentModel.GlobalRef = {
  AnyRefNode RotNode = {ARel = RotMat(pi/2,x); };
};

// These drivers are included for all trials.
//#define _STERNO_CLAVICULA_DRIVER
#define _HARD_NECK_DRIVER

// These drivers are included in the standing reference trial
#ifdef _STANDING_REFERENCE_
   #define _FOOT_FLAT_ON_GROUND_DRIVER
//   #define _SKULL_LOOK_STRAIGHT_DRIVER
//   #define _STERNO_CLAVICULA_PROTRACTION_DRIVER
   #define _THORAX_ROTATION_DRIVER
   #define _THORAX_LATERAL_BENDING_DRIVER
   #define _THORAX_EXTENSION_DRIVER
//   #define _EXTENDED_KNEE_DRIVER
#endif


AnyFolder ExtraDrivers = {
   AnyFolder &JntPos= Main.HumanModel.Mannequin.Posture;
   AnyFolder &JntVel= Main.HumanModel.Mannequin.PostureVel;


#ifdef _STERNO_CLAVICULA_DRIVER
AnyKinEqSimpleDriver SCDriverLeft ={
  AnyKinMeasureOrg &ref3 = Main.HumanModel.BodyModel.Interface.Left.SternoClavicularAxialRotation;
  DriverPos = pi/180*{
    .JntPos.Left.SternoClavicularAxialRotation
  };
  DriverVel = pi/180*{
    .JntVel.Left.SternoClavicularAxialRotation
  };
  Reaction.Type={Off};
  CType = {Soft};
  AnyFolder Weight = { AnyFunConst fun =  { Value ={0.005}; }; };
  WeightFun = {&Weight.fun};
};
AnyKinEqSimpleDriver SCDriverRight ={
  AnyKinMeasureOrg &ref3 = Main.HumanModel.BodyModel.Interface.Right.SternoClavicularAxialRotation;
  DriverPos = pi/180*{
    .JntPos.Right.SternoClavicularAxialRotation
  };
  DriverVel = {
    .JntVel.Right.SternoClavicularAxialRotation
  };
  Reaction.Type={Off};
  CType = {Soft};
  AnyFolder Weight = { AnyFunConst fun =  { Value ={0.005}; }; };
  WeightFun = {&Weight.fun};
};
#endif


  // This ensures the foot is flat on the ground in the
  #ifdef _FOOT_FLAT_ON_GROUND_DRIVER
  AnyKinEqSimpleDriver RightFootGroundDriver={
   AnyKinRotational rot = {
     AnyRefFrame &foot = Main.HumanModel.BodyModel.Right.Leg.Seg.Foot.AnatomicalFrame;
     AnyRefFrame &ground = Main.EnvironmentModel.GlobalRef.RotNode;
     Type = RotAxesAngles;
     Axis1 = y; Axis2 = z;  Axis3 = x;
   };
  MeasureOrganizer = {1,2};
  DriverPos  ={0,0};
  DriverVel = {0,0};
  Reaction.Type={Off,Off};
  CType = {Soft,Soft};
  AnyFolder Weight = { AnyFunConst fun =  { Value ={0.1,0.1}; }; };
  WeightFun = {&Weight.fun};
};

AnyKinEqSimpleDriver LeftFootGroundDriver={
   AnyKinRotational rot = {
     AnyRefFrame &foot = Main.HumanModel.BodyModel.Left.Leg.Seg.Foot.AnatomicalFrame;
     AnyRefFrame &ground = Main.EnvironmentModel.GlobalRef.RotNode;
     Type = RotAxesAngles;
     Axis1 = y; Axis2 = z; Axis3 = x;
   };
  MeasureOrganizer = {1,2};
  DriverPos  ={0,0};
  DriverVel = {0,0};
  Reaction.Type={Off,Off};
  CType = {Soft,Soft};
  AnyFolder Weight = { AnyFunConst fun =  { Value ={0.1,0.1}; }; };
  WeightFun = {&Weight.fun};
};
#endif

#ifdef _SKULL_LOOK_STRAIGHT_DRIVER
AnyKinEqSimpleDriver SkullGroundDriver={
  AnyKinRotational Rot = {
     AnyRefFrame &ref0 = Main.HumanModel.BodyModel.Trunk.SegmentsThorax.SkullSeg.AnatomicalFrame;
     AnyRefFrame &ref1 = Main.EnvironmentModel.GlobalRef.RotNode;
     Type = RotAxesAngles;
     Axis1 = y; Axis2 = z; Axis3 = x;
  };
  MeasureOrganizer = {1,2};
  DriverPos={0,0};
  DriverVel={0,0};
  Reaction.Type={Off,Off};
  CType = {Soft,Soft};
  AnyFolder Weight = { AnyFunConst fun =  { Value ={0.01,0.01}; }; };
  WeightFun = {&Weight.fun};
};
#endif


#ifdef _HARD_NECK_DRIVER

#if AMMR_VERSION_MAJOR < 2
// Pre AMMR 2.0 model
AnyKinEqSimpleDriver HardNeckDriver ={
  AnyKinMeasureOrg &ref =Main.HumanModel.BodyModel.Interface.Trunk.NeckJoint;
  DriverPos = pi/180*{
    .JntPos.NeckExtension
  };
  DriverVel = pi/180*{
    .JntVel.NeckExtension
  };
  Reaction.Type={Off};
};
#else
AnyKinEqSimpleDriver HardNeckDriver ={
  AnyKinMeasureOrg &ref0 =Main.HumanModel.BodyModel.Interface.Trunk.SkullThoraxFlexion;
  AnyKinMeasureOrg &ref1 =Main.HumanModel.BodyModel.Interface.Trunk.SkullThoraxLateralBending;
  AnyKinMeasureOrg &ref2 =Main.HumanModel.BodyModel.Interface.Trunk.SkullThoraxRotation;
  DriverPos = pi/180*{
    .JntPos.NeckExtension, .JntPos.NeckLateralBending, .JntPos.NeckRotation
  };
  DriverVel = pi/180*{
    .JntVel.NeckExtension, .JntVel.NeckLateralBending, .JntVel.NeckRotation
  };
  Reaction.Type={Off,Off,Off};
};
#endif

#endif


#ifdef _STERNO_CLAVICULA_PROTRACTION_DRIVER
AnyKinEqSimpleDriver SternoClavicularProtractionLeft ={
  AnyKinMeasureOrg &ref =Main.HumanModel.BodyModel.Interface.Left.SternoClavicularProtraction;
  DriverPos = pi/180*{
    .JntPos.Left.SternoClavicularProtraction
  };
  DriverVel = pi/180*{
    .JntVel.Left.SternoClavicularProtraction
  };
  Reaction.Type={Off};
  CType = {Soft};
  AnyFolder Weight = { AnyFunConst fun =  { Value ={0.005}; }; };
  WeightFun = {&Weight.fun};
};
AnyKinEqSimpleDriver SternoClavicularProtractionRight ={
  AnyKinMeasureOrg &ref =Main.HumanModel.BodyModel.Interface.Right.SternoClavicularProtraction;
  DriverPos = pi/180*{
    .JntPos.Right.SternoClavicularProtraction
  };
  DriverVel = {
    .JntVel.Right.SternoClavicularProtraction
  };
  Reaction.Type={Off};
  CType = {Soft};
  AnyFolder Weight = { AnyFunConst fun =  { Value ={0.005}; }; };
  WeightFun = {&Weight.fun};
};
#endif

#ifdef _THORAX_ROTATION_DRIVER
AnyKinEqSimpleDriver ThoraxRotation={
  AnyKinMeasureOrg &ref = Main.HumanModel.BodyModel.Interface.Trunk.PelvisThoraxRotation;
  DriverPos= pi/180*{
    .JntPos.PelvisThoraxRotation
  };
  DriverVel={0};
  Reaction.Type={Off};
  CType = {Soft};
  AnyFolder Weight = { AnyFunConst fun =  { Value ={1}; }; };
  WeightFun = {&Weight.fun};
};
#endif
#ifdef _THORAX_EXTENSION_DRIVER
AnyKinEqSimpleDriver ThoraxExtension ={
  AnyKinMeasureOrg &ref = Main.HumanModel.BodyModel.Interface.Trunk.PelvisThoraxExtension ;
  DriverPos=pi/180*{
    .JntPos.PelvisThoraxExtension
  };
  DriverVel={0};
  Reaction.Type={Off};
  CType = {Soft};
  AnyFolder Weight = { AnyFunConst fun =  { Value ={0.05}; }; };
  WeightFun = {&Weight.fun};
};
#endif
#ifdef _THORAX_LATERAL_BENDING_DRIVER
AnyKinEqSimpleDriver ThoraxLateralBending ={
  AnyKinMeasureOrg &ref = Main.HumanModel.BodyModel.Interface.Trunk.PelvisThoraxLateralBending ;
  DriverPos=pi/180*{
    .JntPos.PelvisThoraxLateralBending
  };
  DriverVel={0};
  Reaction.Type={Off};
  CType = {Soft};
  AnyFolder Weight = { AnyFunConst fun =  { Value ={1}; }; };
  WeightFun = {&Weight.fun};
};
#endif

#ifdef _EXTENDED_KNEE_DRIVER
AnyKinEqSimpleDriver Right_KneeFlexion={
  AnyKinMeasureOrg &ref1= Main.HumanModel.BodyModel.Interface.Right.KneeFlexion;
  DriverPos={0};
  DriverVel={0};
  Reaction.Type={Off};
  CType = {Soft};
  AnyFolder Weight = { AnyFunConst fun =  { Value ={1}; }; };
  WeightFun = {&Weight.fun};
};
AnyKinEqSimpleDriver Left_KneeFlexion={
  AnyKinMeasureOrg &ref1= Main.HumanModel.BodyModel.Interface.Left.KneeFlexion;
  DriverPos={0};
  DriverVel={0};
  Reaction.Type={Off};
  CType = {Soft};
  AnyFolder Weight = { AnyFunConst fun =  { Value ={1}; }; };
  WeightFun = {&Weight.fun};
};
#endif

};
