//This file controls which calibrations to be made on the model
AnyFolder Calibration={

  #if RIGHT_LEG_TD + RIGHT_LEG_TD_MUS_3E == 2
  #include "../../LegTD/CalibrationSequenceRight.any"
  #define RIGHT_LEG_TD_CALIBRATION 1
  #else
  #define RIGHT_LEG_TD_CALIBRATION 0
  #endif

//  #if RIGHT_LEG_TD + RIGHT_LEG_TD_HIP_LIGAMENTS == 2
//  #include "../../LegTD/CalibrationSequenceLigRight.any"
//  #define RIGHT_LEG_TD_Lig_CALIBRATION 1
//  #else
//  #define RIGHT_LEG_TD_Lig_CALIBRATION 0
//  #endif

  #if RIGHT_LEG_TD + RIGHT_LEG_TD_MUS_3E + RIGHT_LEG_TD_HIP_LIGAMENTS == 3
  #include "../../LegTD/CalibrationSequenceLigRight.any"
  #define RIGHT_LEG_TD_Lig_CALIBRATION 1
  #else
  #define RIGHT_LEG_TD_Lig_CALIBRATION 0
  #endif

    #if RIGHT_LEG_TD + RIGHT_LEG_TD_SIMPLE_MUSCLES + RIGHT_LEG_TD_HIP_LIGAMENTS == 3
  #include "../../LegTD/CalibrationSequenceLigRight.any"
  #define RIGHT_LEG_TD_Lig_SIMPLE_CALIBRATION 1
  #else
  #define RIGHT_LEG_TD_Lig_SIMPLE_CALIBRATION 0
  #endif

  #if LEFT_LEG_TD + LEFT_LEG_TD_MUS_3E == 2
  #include "../../LegTD/CalibrationSequenceLeft.any"
  #define LEFT_LEG_TD_CALIBRATION 1
  #else
  #define LEFT_LEG_TD_CALIBRATION 0
  #endif

//  #if LEFT_LEG_TD + LEFT_LEG_TD_HIP_LIGAMENTS == 2
//  #include "../../LegTD/CalibrationSequenceLigLeft.any"
//  #define LEFT_LEG_TD_Lig_CALIBRATION 1
//  #else
//  #define LEFT_LEG_TD_Lig_CALIBRATION 0
//  #endif

  #if LEFT_LEG_TD + LEFT_LEG_TD_MUS_3E + LEFT_LEG_TD_HIP_LIGAMENTS == 3
  #include "../../LegTD/CalibrationSequenceLigLeft.any"
  #define LEFT_LEG_TD_Lig_CALIBRATION 1
  #else
  #define LEFT_LEG_TD_Lig_CALIBRATION 0
  #endif

    #if LEFT_LEG_TD + LEFT_LEG_TD_SIMPLE_MUSCLES + LEFT_LEG_TD_HIP_LIGAMENTS == 3
  #include "../../LegTD/CalibrationSequenceLigLeft.any"
  #define LEFT_LEG_TD_Lig_SIMPLE_CALIBRATION 1
  #else
  #define LEFT_LEG_TD_Lig_SIMPLE_CALIBRATION 0
  #endif


  #if RIGHT_LEG + RIGHT_LEG_MUS_3E == 2
  #include "../../Leg/CalibrationSequenceRight.any"
  #define RIGHT_LEG_CALIBRATION 1
  #else
  #define RIGHT_LEG_CALIBRATION 0
  #endif

  #if LEFT_LEG + LEFT_LEG_MUS_3E == 2
  #include "../../Leg/CalibrationSequenceLeft.any"
  #define LEFT_LEG_CALIBRATION 1
  #else
  #define LEFT_LEG_CALIBRATION 0
  #endif

  #if RIGHT_ARM + RIGHT_ARM_MUS_3E == 2
    #if TRUNK_NECK == 1
    #include "../../Arm/CalibrationSequenceNeckRight.any"
    #else
    #include "../../Arm/CalibrationSequenceRight.any"
    #endif
  #define RIGHT_ARM_CALIBRATION 1
  #else
  #define RIGHT_ARM_CALIBRATION 0
  #endif

  #if LEFT_ARM + LEFT_ARM_MUS_3E == 2
    #if TRUNK_NECK == 1
    #include "../../Arm/CalibrationSequenceNeckLeft.any"
    #else
    #include "../../Arm/CalibrationSequenceLeft.any"
    #endif
  #define LEFT_ARM_CALIBRATION 1
  #else
  #define LEFT_ARM_CALIBRATION 0
  #endif

  #ifdef LumbarLigaments
    #include "../../Trunk/CalibrationSequence.any"
    #define LUMBAR_LIG_CALIBRATION 1
  #else
    #define LUMBAR_LIG_CALIBRATION 0
  #endif

  #if RIGHT_LEG_TD_CALIBRATION + LEFT_LEG_TD_CALIBRATION + RIGHT_LEG_CALIBRATION + LEFT_LEG_CALIBRATION + RIGHT_ARM_CALIBRATION + LEFT_ARM_CALIBRATION + LUMBAR_LIG_CALIBRATION + RIGHT_LEG_TD_Lig_CALIBRATION + LEFT_LEG_TD_Lig_CALIBRATION  + RIGHT_LEG_TD_Lig_SIMPLE_CALIBRATION + LEFT_LEG_TD_Lig_SIMPLE_CALIBRATION == 0
  AnyOperationDummy CalibrationSequence ={};
  #else
  AnyOperationSequence CalibrationSequence ={};
  #endif

};
