    AnyFolder &ref=HumanModel;
    ref={
      AnyFolder &Mannequin=.KinematicStudyForParameterIdentification.Mannequin;
      #include  "BodyPartsSetup2.any"
    };
    #include "HumanModel.any"

    AnyBodyStudy KinematicStudyForParameterIdentification = {
      AnyFolder &C3DData=..ModelSetup.C3DFileData ;

      AnyFolder &BodyModel = .HumanModel.BodyModel;

      //This mannequin calculates a guess on the initial pelvis position based on ASIS and PSI markers
      //if these markers do not exist in the markerset used this has to be changed
      #include "Mannequin.any"  // this file controls the initial position of the model and he posture

      //Environment around the human
      AnyFolder EnvironmentModel ={
        //Model of the floor and force plates this is where the force plates are defined
        AnyFolder &BodyModelRef=.BodyModel;
        //This environment file makes use of automatic detecteion of which foot are incontact with which plate
        #if SetupFDA
        #include "EnvironmentAutoDetectionType2.any"
        #endif
        #if SetupABT
        #include "EnvironmentAutoDetectionType4.any"
        #endif
        //This environment file has no automatic detecteion of which foot are incontact with which plate it has to be set manually
        //#include "Environment.any"
      };


  #if OffsetForKinematics
      #include "HipExchange.any"
      #include "STL.any"
  #endif


      //Connection between environment and the human
      AnyFolder ModelEnvironmentConnection = {
        AnyFolder Drivers={

          // Aliases for convenient referencing
          AnyFolder &JntPos=..Mannequin.Posture;
          AnyFolder &JntVel=..Mannequin.PostureVel;
        };};

      #include "JointAngleOutputs.any"
      #include "UndefineBodyPartSetup.any"

      Kinematics.PosAnalysisOnlyOnOff=On; //only run the position analysis
      nStep=floor(Main.ModelSetup.nStep/6); //run this analysis with a reduced step number be carefull it can be too low!

      #if SetupFDA
      Gravity ={0, 0, -9.81};
      #endif
      #if SetupABT
      Gravity ={0, -9.81 , 0};
      #endif

      tStart = Main.TrialSpecificData.tStart+2*Kinematics.ApproxVelAccPerturb;
      tEnd = Main.TrialSpecificData.tEnd-2*Kinematics.ApproxVelAccPerturb;

      InitialConditions.SolverType = KinSolOverDeterminate;
      Kinematics.SolverType = KinSolOverDeterminate;
      Main.Studies.KinematicStudyForParameterIdentification.InitialConditions.KinematicTol=1e-3;
      Main.Studies.KinematicStudyForParameterIdentification.Kinematics.KinematicTol=1e-3; };

    AnyOptKinStudy ParameterIdentification =     {
      AnyFolder &StudyRef = .KinematicStudyForParameterIdentification;
      ParameterOptimization.ConvergenceTol=1e-2;
      Analysis =   {
        AnyOperation &ref = .StudyRef.Kinematics;};};

    AnyBodyStudy MotionOptimization = {


      AnyFolder &C3DData=..ModelSetup.C3DFileData ;

      AnyFolder &BodyModel=.HumanModel.BodyModel;
      AnyFolder &ModelOptimizationModel=.KinematicStudyForParameterIdentification;
      AnyFolder &JointAngleOutput=.KinematicStudyForParameterIdentification.JointAngleOutputs;

      Kinematics.PosAnalysisOnlyOnOff=On;

        #if SetupFDA
        Gravity ={0, 0, -9.81};
        nStep = Main.ModelSetup.nStep - Main.Parameters.TimeStepOffset;
        #endif
        #if SetupABT
        Gravity ={0, -9.81 , 0};
        nStep = Main.ModelSetup.nStep - Main.Parameters.TimeStepOffset;
        #endif


      tStart = Main.TrialSpecificData.tStart+2*Kinematics.ApproxVelAccPerturb;
      tEnd = Main.TrialSpecificData.tEnd-2*Kinematics.ApproxVelAccPerturb;

      InitialConditions.SolverType = KinSolOverDeterminate;
      Kinematics.SolverType = KinSolOverDeterminate;};
