// File of anthropometric data based on data from the book
//Dynamics of Human Gait (Second Edition)
//Christopher L Vaughan, PhD
//University of Cape Town
//Brian L Davis, PhD
//Cleveland Clinic Foundation
//Jeremy C O’Connor, BSc (Eng)
//University of Cape Town


// Hack to solve a problem with new scaling system and where mocap model
// file expect to find AnthroSegmentLengths folder.
Main.HumanModel.Scaling = {
    AnyFolder &AnthroSegmentLengths = Scaling.AnthroSegmentLengths ;
  };


AnyVar BMI = AnthroData.Body_Mass/(AnthroData.body_height^2);
  AnyVar FatPercent = (-0.09 + 0.0149*BMI - 0.00009*BMI^2)*100; //Estimation from Frankenfield et al. (2001) valid for men


AnyFolder AnthroData = {


  AnyVar Body_Mass = Main.ModelSetup.SubjectSpecificData.Anthropometrics.BodyMass ;
  AnyVar  body_height =Main.ModelSetup.SubjectSpecificData.Anthropometrics.BodyHeight ;
  //Only the masses for the leg are used for the gait model, but the a full dataset
  //needs to be present in order to load the model


  //Segment masses in kg from Winter ("Biomechanics and motor control of human movement." David A. Winter)
  AnyVar lumbar = 0.139*Body_Mass; // T12-L1 to L5-Sacrum
  AnyVar thorax = 0.1894*Body_Mass; // C7-T1 to T12-L1 (modified from 0.216 winter to separate scapula)
  AnyVar pelvis = 0.142*Body_Mass;
  AnyVar clavicle_r = 0.0133*Body_Mass;
  AnyVar upper_arm_r = 0.028*Body_Mass;
  AnyVar lower_arm_r = 0.016*Body_Mass;
  AnyVar hand_r = 0.006*Body_Mass;
  AnyVar clavicle_l = 0.0133*Body_Mass;
  AnyVar upper_arm_l = 0.028*Body_Mass;
  AnyVar lower_arm_l = 0.016*Body_Mass;
  AnyVar hand_l = 0.006*Body_Mass;
  AnyVar head = 0.081*Body_Mass; // head and cervical
  AnyVar thigh_r = 0.1*Body_Mass;
  AnyVar lower_leg_r = 0.0465*Body_Mass;
  AnyVar foot_r = 0.0145*Body_Mass;
  AnyVar ball_r = 0.000;
  AnyVar thigh_l = 0.1*Body_Mass;
  AnyVar lower_leg_l = 0.0465*Body_Mass;
  AnyVar foot_l = 0.0145*Body_Mass;
  AnyVar ball_l = 0.000;


  // Those two folders are used by the TD leg
  AnyFolder Right ={
    AnyVar thigh = 0.1*.Body_Mass;
    AnyVar lower_leg = 0.0465*.Body_Mass;
    AnyVar talus = 0.0145*0.2*.Body_Mass; //20% of total foot (from bone volume ratio)
    AnyVar foot = 0.0145*0.8*.Body_Mass; //80% of total foot (from bone volume ratio)
    AnyVar ball = 0.000;
  };
  AnyFolder Left={
    AnyVar thigh = 0.1*.Body_Mass;
    AnyVar lower_leg = 0.0465*.Body_Mass;
    AnyVar talus = 0.0145*0.2*.Body_Mass; //20% of total foot (from bone volume ratio)
    AnyVar foot = 0.0145*0.8*.Body_Mass; //80% of total foot (from bone volume ratio)
    AnyVar ball = 0.000;
  };

};

//Only the lenghts for the leg are used for this model, but the a full dataset
//needs to be present in order to load the model
AnyFolder AnthroSegmentLengths = {
  AnyVar ThighLength = DesignVar( Main.ModelSetup.SubjectSpecificData.Anthropometrics.ThighLengthIni);
  AnyVar ShankLength = DesignVar( Main.ModelSetup.SubjectSpecificData.Anthropometrics.ShankLengthIni);
  AnyVar FootLength = DesignVar( Main.ModelSetup.SubjectSpecificData.Anthropometrics.FootLengthIni);
  AnyVar PelvisWidth = DesignVar( Main.ModelSetup.SubjectSpecificData.Anthropometrics.PelvisWidthIni); //distance between hip joints
  AnyVar HeadHeight = DesignVar( Main.ModelSetup.SubjectSpecificData.Anthropometrics.HeadHeightIni );//height in neutral position from  C1HatNode to top of head
  AnyVar NeckLength = DesignVar( Main.ModelSetup.SubjectSpecificData.Anthropometrics.NeckLengthIni);
  AnyVar TrunkHeight = DesignVar( Main.ModelSetup.SubjectSpecificData.Anthropometrics.TrunkHeightIni );//height in neautral position from  C1HatNode to L5SacrumJnt
  AnyVar TrunkWidth = DesignVar (Main.ModelSetup.SubjectSpecificData.Anthropometrics.TrunkWidthIni );//Width from acromium to acromieautral position from  C1HatNode to L5SacrumJnt
  AnyVar UpperArmLength = DesignVar( Main.ModelSetup.SubjectSpecificData.Anthropometrics.UpperArmLengthIni );
  AnyVar LowerArmLength =DesignVar( Main.ModelSetup.SubjectSpecificData.Anthropometrics.LowerArmLengthIni );
  AnyVar HandLength = DesignVar( Main.ModelSetup.SubjectSpecificData.Anthropometrics.HandLengthIni );
  AnyVar HandBreadth = DesignVar( Main.ModelSetup.SubjectSpecificData.Anthropometrics.HandBreadthIni );


  // Those two folders are used by the TD leg
  AnyFolder Right ={
    AnyVar ThighLength = DesignVar(Main.ModelSetup.SubjectSpecificData.Anthropometrics.ThighLengthIni) ;
    AnyVar ShankLength =DesignVar(Main.ModelSetup.SubjectSpecificData.Anthropometrics.ShankLengthIni) ;
    AnyVar FootLength = DesignVar(Main.ModelSetup.SubjectSpecificData.Anthropometrics.FootLengthIni);
    AnyVar TalusLength = 0.133*FootLength; // calculated automaticaly from the foot size
  };

  AnyFolder Left ={
    AnyVar ThighLength = .Right.ThighLength;
    AnyVar ShankLength = .Right.ShankLength;
    AnyVar FootLength = .Right.FootLength;
    AnyVar TalusLength = .Right.TalusLength;
  };


};

//};
