#include "IncludeFile.any"

Main = {

#include "ModelSetup.any"

  // Include Environment model
  // e.g. global ref, forceplates etc.
  #include "EnvironmentModel.any"

  // Configure and include the human model
  #include "<BODY_MODEL_CONFIG_FILE>"
  #include "<ANYBODY_PATH_BODY>/HumanModel.any"

  // Define the studies
  AnyFolder Studies = {

    // Study for parameter identification
    // optimization of segment length and marker positions.
    AnyOptKinStudy ParameterIdentification = {
      #include "KinematicStudyForParameterIdentification.any"
      Analysis = { AnyOperation &ref = ..InverseDynamics.Kinematics;};
      ParameterOptimization.ConvergenceTol=1e-3;
    };

    // Study for running the inverse dynamic simulation
    AnyBodyStudy InverseDynamics = {
      AnyFolder &C3DData= Main.ModelSetup.C3DFileData ;
      AnyFolder &BodyModel= Main.HumanModel.BodyModel;
      AnyFolder &EnvironmentModel = Main.EnvironmentModel;
      AnyFolder ModelEnvironmentConnection ={
        AnyFolder &MarkerDrivers = Main.ModelSetup.MocapDrivers;
        #include "<MOCAP_EXTRA_DRIVERS_FILE>"
      };
      #include "InverseDynamicSettings.any"
      nStep= Main.ModelSetup.nStep;
      Gravity = Main.ModelSetup.LabSpecificData.Gravity;
      tStart = Main.ModelSetup.tStart;
      tEnd = Main.ModelSetup.tEnd;
    };

  };//Studies

}; //Main
