 // ----------------------------------------------------------
// Model configuration:
// For more info on body model configuration options please load the model and double click on:
// #include "<ANYBODY_PATH_BODY>\Documentation\BodyModel.parameters.any"
// ----------------------------------------------------------

#path BM_DRAWSETTINGS_FILE "DrawSettings.any"
#define BM_TRUNK_NECK ON
#define BM_SCALING CONST_SCALING_LENGTHMASSFAT
#path BM_SCALING_ANTHRO_FILE "AnyMan.any"
#path BM_MANNEQUIN_FILE "Mannequin.any"
#define BM_LEG_MUSCLES_BOTH CONST_MUSCLES_SIMPLE
#define BM_TRUNK_MUSCLES CONST_MUSCLES_SIMPLE
#define BM_ARM_MUSCLES_BOTH CONST_MUSCLES_SIMPLE
#define BM_MANNEQUIN_DRIVER_DEFAULT OFF
