    AnyString PrefixStr=""; //if the dataset makes use of a prefix name which goes in front of all markers and processed datanames write it here
    #define PrefixDef(Arg) Arg
    FileName = MOCAP_C3D_DATA_PATH +"/"+ Main.ModelSetup.TrialSpecificData.TrialFileName + ".c3d"; //add the extension to the file name here
    ConstructModelOnOff = Off;
    ConstructChartOnOff = Off;

    MarkerUseAllPointsOnOff = On;
    MarkerUseCamMaskOnOff = Off;
    PointsScaleFactor = 1/1000;
    MarkerDrawOnOff =On;

    // HACK_WORKAROUND. We need to disable filters when
    // using recordings which has less data than 3 times filter order
    // This approach assumes a filter order of 2.
    MarkerFilterIndex = iffun(gtfun(Header.LastFrameNo-Header.FirstFrameNo+1,Main.ModelSetup.LabSpecificData.MarkerDataFilterOrder*3 ), 0 ,-1) ;
    AnalogFilterIndex = iffun(gtfun((Header.LastFrameNo-Header.FirstFrameNo+1)*Header.NoAnalogSamplesPer3DFrame,
                                     Main.ModelSetup.LabSpecificData.AnalogDataFilterOrder*3 ), 1 ,-1);

    Filter =  {
      N = Main.ModelSetup.LabSpecificData.MarkerDataFilterOrder;
      Fc = {Main.ModelSetup.LabSpecificData.MarkerDataCutOffFrequency };
      Type = LowPass;
    };

    /// This filter is used for the analog data
    AnyFunButterworthFilter LowPassFilter = {
      FilterForwardBackwardOnOff = On;
      AutomaticInitialConditionOnOff = On;
      N = Main.ModelSetup.LabSpecificData.AnalogDataFilterOrder ;
      AnyVar CutOffFrequency=Main.ModelSetup.LabSpecificData.AnalogDataFilterCutOffFrequency ;

      AnyVar SampleFreq=.Header.VideoFrameRate* .Header.NoAnalogSamplesPer3DFrame   ;
      W = {1/(iffun(eqfun(SampleFreq,0),100.0,SampleFreq)*0.5)*CutOffFrequency};
      Type = LowPass;
    };


    MarkerScaleXYZ = 0.015*{1,1,1};
    MarkerRGB={0,0,1};
