#ifndef MOCAP_C3D_DATA_PATH
#path MOCAP_C3D_DATA_PATH "<ANYBODY_PATH_MAINFILEDIR>"
#endif

#ifndef MOCAP_OUTPUT_FILENAME_PREFIX
 #define MOCAP_OUTPUT_FILENAME_PREFIX ""
#endif

#ifndef BODY_MODEL_CONFIG_FILE
#path BODY_MODEL_CONFIG_FILE  "BodyModelConfig_FullBody.any"
#endif


#ifndef MOCAP_EXTRA_DRIVERS_FILE
#path MOCAP_EXTRA_DRIVERS_FILE "EmptyDummyFile.any"
#endif

#ifndef MOCAP_EXTRA_DRIVERS_FILE
#path MOCAP_EXTRA_DRIVERS_FILE "EmptyDummyFile.any"
#endif

#ifndef MOCAP_MARKER_PROTOCOL_FILE
#path MOCAP_MARKER_PROTOCOL_FILE "EmptyDummyFile.any"
#endif

#ifndef MOCAP_FORCE_PLATE_FILE
#path MOCAP_FORCE_PLATE_FILE "EmptyDummyFile.any"
#endif
