#include "helper_macros.any"

AnyFolder JointsAndDrivers = {
#ifndef FORCE_MODEL_LOAD_WHEN_DATA_FILES_ARE_MISSING
  // Macro for initializing a empty mxn matrix

  AnyKinDriver JntDriverTrunk = {
    AnyInputFile FileReader = {
        FileName = TEMP_PATH + "/" + MOCAP_JOINT_ANGLE_FILE_PREFIX + MOCAP_OUTPUT_FILENAME_PREFIX + Main.ModelSetup.TrialSpecificData.TrialFileName + "-euler-trunk.txt";
        FileErrorContinueOnOff = On;
        #if ANYBODY_V1 >= 6 & ANYBODY_V2 >= 1
        ReloadOnOff = On;
        SuppressWarningsOnOff = On;
        TOnOff = DesignVar(On);
        // Get the rotation angles fromt the initial pelvis rotation matrix.
        // This allows us to specify a default driver which is close to the
        // load time position.
        RotAxisAnglesZYX InitPelvis(ROT = Main.ModelSetup.TrialSpecificData.InitialPositionOfBody.PelvisRotationMatrix) = { };
        AnyInt Length0 = Main.Studies.KinematicStudy.nStep;
        T0 = Main.Studies.KinematicStudy.tArray;
        Data0 =
        {
          Main.ModelSetup.TrialSpecificData.InitialPositionOfBody.PelvisPos[0],
          Main.ModelSetup.TrialSpecificData.InitialPositionOfBody.PelvisPos[1],
          Main.ModelSetup.TrialSpecificData.InitialPositionOfBody.PelvisPos[2],
          InitPelvis.xRot, InitPelvis.yRot, InitPelvis.zRot,
          0,0,0,0
          #ifndef _OLD_NECK_INTERFACE_
          ,0,0
          #endif
        }'* (ONES(1,Length0));
        #endif
    };
    AnyFunInterpol InterpolatedData = {
      Type  = iffun(gtfun(.FileReader.Length0, 1), round(Obj2Num(&Bspline)) , round(Obj2Num(&ConstantValue)));
      BsplineOrder = min({4,.FileReader.Length0});
      // Check if the start time is with the range of data in the file.
      // We need to add/substract a tiny quantity from the read data,
      // since file data saved with 15 digit and thus could have lost some precession. .
      AnyInt ValidData = andfun( gteqfun(Main.Studies.InverseDynamicStudy.tArray[0], .FileReader.T[0]-1e-13),
                                 lteqfun(Main.Studies.InverseDynamicStudy.tArray[0], .FileReader.T[NumElemOf(.FileReader.T)-1]+1e-13));
      #if ANYBODY_V1 >= 6 & ANYBODY_V2 >= 1
      // `iffun` will select the shortest of its inputs as output size.
      // If the largest array is returned it will get cropped, but data gets mangled since
      // it crops the data outer dimesion. To avoid that we transpose the input and transform
      // it back again.
      Data = iffun({ValidData}, .FileReader.Data', .FileReader.Data0')';
      T = iffun({ValidData}, .FileReader.T, .FileReader.T0);
      #else
      Data = .FileReader.Data;
      T = .FileReader.T;
      #endif
    };
    AnyMessage AnyMocap_msg1=
    {
      AnyInt nDataFileIdx = max({0,.FileReader.nDataInFile-1});
      AnyVar maxtime =  .FileReader.T[min({nDataFileIdx, NumElemOf(.FileReader.T)})];
      TriggerRuntime = andfun(.InterpolatedData.ValidData,
                              andfun(....iStep, gtfun(....t,  maxtime )));
      Type = MSG_Error;
      Message = DesignVar(strformat("\nNo kinematic joint angle data available after t = "+strval(maxtime,  "%.3g") + "s.\n " +
      "Please re-run the complete kinematic analysis to recompute all joint angles and data."));
    };
    AnyMessage AnyMocap_msg2=
    {
      TriggerRuntime = andfun(....iStep, not(.InterpolatedData.ValidData));
      Type = MSG_Error;
      Message = DesignVar(strformat("\nNo valid kinematic joint angle data available.\nPlease run the Kinematic analysis first"));
    };

    AnyKinMeasureOrg &PelvisPosX = ...BodyModel.Interface.Trunk.PelvisPosX;
    AnyKinMeasureOrg &PelvisPosY = ...BodyModel.Interface.Trunk.PelvisPosY;
    AnyKinMeasureOrg &PelvisPosZ = ...BodyModel.Interface.Trunk.PelvisPosZ;
    AnyKinMeasureOrg &PelvisRotX = ...BodyModel.Interface.Trunk.PelvisRotX;
    AnyKinMeasureOrg &PelvisRotY = ...BodyModel.Interface.Trunk.PelvisRotY;
    AnyKinMeasureOrg &PelvisRotZ = ...BodyModel.Interface.Trunk.PelvisRotZ;
    AnyKinMeasureOrg &PelvisThoraxExtension = ...BodyModel.Interface.Trunk.PelvisThoraxExtension;
    AnyKinMeasureOrg &PelvisThoraxLateralBending = ...BodyModel.Interface.Trunk.PelvisThoraxLateralBending;
    AnyKinMeasureOrg &PelvisThoraxRotation = ...BodyModel.Interface.Trunk.PelvisThoraxRotation;
    #ifdef _OLD_NECK_INTERFACE_
    AnyKinMeasureOrg& NeckJoint = ...BodyModel.Interface.Trunk.NeckJoint;
    Reaction.Type={On,On,On,On,On,On,Off,Off,Off,Off};
    #else
    AnyKinMeasureOrg& SkullThoraxFlexion = ...BodyModel.Interface.Trunk.SkullThoraxFlexion;
    AnyKinMeasureOrg& SkullThoraxLateralBending = ...BodyModel.Interface.Trunk.SkullThoraxLateralBending;
    AnyKinMeasureOrg& SkullThoraxRotation = ...BodyModel.Interface.Trunk.SkullThoraxRotation;
    Reaction.Type={On,On,On,On,On,On,Off,Off,Off,Off,Off,Off};
    #endif
  };

  #if BM_LEG_LEFT == CONST_LEG_MODEL_TLEM
  AnyKinDriver JntDriverLeftLegTD = {
    AnyFunInterpol InterpolatedData = {
      Type  = iffun(gtfun(.FileReader.Length0, 1), round(Obj2Num(&Bspline)) , round(Obj2Num(&ConstantValue)));
      BsplineOrder = min({4,.FileReader.Length0});
      AnyInt ValidData = andfun( gteqfun(Main.Studies.InverseDynamicStudy.tArray[0], .FileReader.T[0]-1e-13),
                                 lteqfun(Main.Studies.InverseDynamicStudy.tArray[0], .FileReader.T[NumElemOf(.FileReader.T)-1]+1e-13));
      #if  ANYBODY_V1 >= 6 & ANYBODY_V2 >= 1
      Data = iffun({ValidData},.FileReader.Data', .FileReader.Data0')';
      T = iffun({ValidData}, .FileReader.T, .FileReader.T0);
      #else
      Data = .FileReader.Data;
      T = .FileReader.T;
      #endif
    };
    AnyInputFile FileReader = {
        FileName = TEMP_PATH + "/" + MOCAP_JOINT_ANGLE_FILE_PREFIX +MOCAP_OUTPUT_FILENAME_PREFIX + Main.ModelSetup.TrialSpecificData.TrialFileName + "-euler-leftlegtd.txt";
        FileErrorContinueOnOff = On;
        #if ANYBODY_V1 >= 6 & ANYBODY_V2 >= 1
        ReloadOnOff = On;
        SuppressWarningsOnOff = On;
        AnyInt Length0 = Main.Studies.KinematicStudy.nStep;
        T0 = Main.Studies.KinematicStudy.tArray;
         Data0 =  ZEROS(.nDim, Length0 );
        #endif
    };
    AnyKinMeasureOrg &HipFlexion = ...BodyModel.Interface.Left.HipFlexion;
    AnyKinMeasureOrg &HipAbduction = ...BodyModel.Interface.Left.HipAbduction;
    AnyKinMeasureOrg &HipExternalRotation = ...BodyModel.Interface.Left.HipExternalRotation;
    AnyKinMeasureOrg &KneeFlexion = ...BodyModel.Interface.Left.KneeFlexion;
    AnyKinMeasureOrg &AnklePlantarFlexion = ...BodyModel.Interface.Left.AnklePlantarFlexion;
    AnyKinMeasureOrg &SubTalarEversion = ...BodyModel.Interface.Left.SubTalarEversion;
    Reaction.Type={Off,Off,Off,Off,Off,Off};
  };
  #endif


  #if BM_LEG_RIGHT == CONST_LEG_MODEL_TLEM
  AnyKinDriver JntDriverRightLegTD = {
    AnyFunInterpol InterpolatedData = {
      Type  = iffun(gtfun(.FileReader.Length0, 1), round(Obj2Num(&Bspline)) , round(Obj2Num(&ConstantValue)));
      BsplineOrder = min({4,.FileReader.Length0});
      AnyInt ValidData = andfun( gteqfun(Main.Studies.InverseDynamicStudy.tArray[0], .FileReader.T[0]-1e-13),
                                 lteqfun(Main.Studies.InverseDynamicStudy.tArray[0], .FileReader.T[NumElemOf(.FileReader.T)-1]+1e-13));
      #if  ANYBODY_V1 >= 6 & ANYBODY_V2 >= 1
      Data = iffun({ValidData},.FileReader.Data', .FileReader.Data0')';
      T = iffun({ValidData}, .FileReader.T, .FileReader.T0);
      #else
      Data = .FileReader.Data;
      T = .FileReader.T;
      #endif
    };
    AnyInputFile FileReader = {
      FileName = TEMP_PATH + "/" + MOCAP_JOINT_ANGLE_FILE_PREFIX +  MOCAP_OUTPUT_FILENAME_PREFIX + Main.ModelSetup.TrialSpecificData.TrialFileName + "-euler-rightlegtd.txt";
      FileErrorContinueOnOff = On;
      #if  ANYBODY_V1 >= 6 & ANYBODY_V2 >= 1
      ReloadOnOff = On;
      SuppressWarningsOnOff = On;
      AnyInt Length0 = Main.Studies.KinematicStudy.nStep;
      T0 = Main.Studies.KinematicStudy.tArray;
       Data0 =  ZEROS(.nDim, Length0 );
      #endif
    };
    AnyKinMeasureOrg &HipFlexion = ...BodyModel.Interface.Right.HipFlexion;
    AnyKinMeasureOrg &HipAbduction = ...BodyModel.Interface.Right.HipAbduction;
    AnyKinMeasureOrg &HipExternalRotation = ...BodyModel.Interface.Right.HipExternalRotation;
    AnyKinMeasureOrg &KneeFlexion = ...BodyModel.Interface.Right.KneeFlexion;
    AnyKinMeasureOrg &AnklePlantarFlexion = ...BodyModel.Interface.Right.AnklePlantarFlexion;
    AnyKinMeasureOrg &SubTalarEversion = ...BodyModel.Interface.Right.SubTalarEversion;
    Reaction.Type={Off,Off,Off,Off,Off,Off};
  };
  #endif


  #if BM_LEG_LEFT == CONST_LEG_MODEL_Leg
  AnyKinDriver JntDriverLeftLeg = {
    AnyFunInterpol InterpolatedData = {
      Type  = iffun(gtfun(.FileReader.Length0, 1), round(Obj2Num(&Bspline)) , round(Obj2Num(&ConstantValue)));
      BsplineOrder = min({4,.FileReader.Length0});
      AnyInt ValidData = andfun( gteqfun(Main.Studies.KinematicStudy.tArray[0], .FileReader.T[0]-1e-13),
                                 lteqfun(Main.Studies.KinematicStudy.tArray[0], .FileReader.T[NumElemOf(.FileReader.T)-1]+1e-13));
      #if  ANYBODY_V1 >= 6 & ANYBODY_V2 >= 1
      Data = iffun({ValidData},.FileReader.Data', .FileReader.Data0')';
      T = iffun({ValidData}, .FileReader.T, .FileReader.T0);
      #else
      Data = .FileReader.Data;
      T = .FileReader.T;
      #endif
    };
    AnyInputFile FileReader = {
      FileName = TEMP_PATH + "/" + MOCAP_JOINT_ANGLE_FILE_PREFIX + MOCAP_OUTPUT_FILENAME_PREFIX + Main.ModelSetup.TrialSpecificData.TrialFileName + "-euler-leftleg.txt";
      FileErrorContinueOnOff = On;
      #if ANYBODY_V1 >= 6 & ANYBODY_V2 >= 1
      ReloadOnOff = On;
      SuppressWarningsOnOff = On;
      AnyInt Length0 = Main.Studies.KinematicStudy.nStep;
      T0 = Main.Studies.KinematicStudy.tArray;
       Data0 =  ZEROS(.nDim, Length0);
      #endif
    };
    AnyKinMeasureOrg &HipFlexion = ...BodyModel.Interface.Left.HipFlexion;
    AnyKinMeasureOrg &HipAbduction = ...BodyModel.Interface.Left.HipAbduction;
    AnyKinMeasureOrg &HipExternalRotation = ...BodyModel.Interface.Left.HipExternalRotation;
    AnyKinMeasureOrg &KneeFlexion = ...BodyModel.Interface.Left.KneeFlexion;
    AnyKinMeasureOrg &AnklePlantarFlexion = ...BodyModel.Interface.Left.AnklePlantarFlexion;
    AnyKinMeasureOrg &AnkleEversion = ...BodyModel.Interface.Left.AnkleEversion;
    Reaction.Type={Off,Off,Off,Off,Off,Off};
  };
  #endif


  #if BM_LEG_RIGHT== CONST_LEG_MODEL_Leg
  AnyKinDriver JntDriverRightLeg = {
    AnyFunInterpol InterpolatedData = {
      Type  = iffun(gtfun(.FileReader.Length0, 1), round(Obj2Num(&Bspline)) , round(Obj2Num(&ConstantValue)));
      BsplineOrder = min({4,.FileReader.Length0});
      AnyInt ValidData = andfun( gteqfun(Main.Studies.InverseDynamicStudy.tArray[0], .FileReader.T[0]-1e-13),
                                 lteqfun(Main.Studies.InverseDynamicStudy.tArray[0], .FileReader.T[NumElemOf(.FileReader.T)-1]+1e-13));
      #if  ANYBODY_V1 >= 6 & ANYBODY_V2 >= 1
      Data = iffun({ValidData},.FileReader.Data', .FileReader.Data0')';
      T = iffun({ValidData}, .FileReader.T, .FileReader.T0);
      #else
      Data = .FileReader.Data;
      T = .FileReader.T;
      #endif
    };
    AnyInputFile FileReader = {
      FileName = TEMP_PATH + "/" + MOCAP_JOINT_ANGLE_FILE_PREFIX + MOCAP_OUTPUT_FILENAME_PREFIX + Main.ModelSetup.TrialSpecificData.TrialFileName + "-euler-rightleg.txt";
      FileErrorContinueOnOff = On;
      #if ANYBODY_V1 >= 6 & ANYBODY_V2 >= 1
      ReloadOnOff = On;
      SuppressWarningsOnOff = On;
      AnyInt Length0 = Main.Studies.KinematicStudy.nStep;
      T0 = Main.Studies.KinematicStudy.tArray;
       Data0 =  ZEROS(.nDim, Length0);
      #endif
    };
    AnyKinMeasureOrg &HipFlexion = ...BodyModel.Interface.Right.HipFlexion;
    AnyKinMeasureOrg &HipAbduction = ...BodyModel.Interface.Right.HipAbduction;
    AnyKinMeasureOrg &HipExternalRotation = ...BodyModel.Interface.Right.HipExternalRotation;
    AnyKinMeasureOrg &KneeFlexion = ...BodyModel.Interface.Right.KneeFlexion;
    AnyKinMeasureOrg &AnklePlantarFlexion = ...BodyModel.Interface.Right.AnklePlantarFlexion;
    AnyKinMeasureOrg &AnkleEversion = ...BodyModel.Interface.Right.AnkleEversion;
    Reaction.Type={Off,Off,Off,Off,Off,Off};
  };
  #endif


  #if BM_ARM_LEFT == ON
  AnyKinDriver JntDriverLeftArm = {
    AnyFunInterpol InterpolatedData = {
      Type  = iffun(gtfun(.FileReader.Length0, 1), round(Obj2Num(&Bspline)) , round(Obj2Num(&ConstantValue)));
      BsplineOrder = min({4,.FileReader.Length0});
      AnyInt ValidData = andfun( gteqfun(Main.Studies.InverseDynamicStudy.tArray[0], .FileReader.T[0]-1e-13),
                                 lteqfun(Main.Studies.InverseDynamicStudy.tArray[0], .FileReader.T[NumElemOf(.FileReader.T)-1]+1e-13));
      #if ANYBODY_V1 >= 6 & ANYBODY_V2 >= 1
      Data = iffun({ValidData},.FileReader.Data', .FileReader.Data0')';
      T = iffun({ValidData}, .FileReader.T, .FileReader.T0);
      #else
      Data = .FileReader.Data;
      T = .FileReader.T;
      #endif
    };
    AnyInputFile FileReader = {
      FileName = TEMP_PATH + "/" + MOCAP_JOINT_ANGLE_FILE_PREFIX + MOCAP_OUTPUT_FILENAME_PREFIX + Main.ModelSetup.TrialSpecificData.TrialFileName + "-euler-leftarm.txt";
      FileErrorContinueOnOff = On;
      #if ANYBODY_V1 >= 6 & ANYBODY_V2 >= 1
      ReloadOnOff = On;
      SuppressWarningsOnOff = On;
      AnyInt Length0 = Main.Studies.KinematicStudy.nStep;
      T0 = Main.Studies.KinematicStudy.tArray;
       Data0 =  ZEROS(.nDim, Length0);
      #endif
    };
    AnyKinMeasureOrg &SternoClavicularProtraction=...BodyModel.Interface.Left.SternoClavicularProtraction;
    AnyKinMeasureOrg &SternoClavicularElevation=...BodyModel.Interface.Left.SternoClavicularElevation;
    AnyKinMeasureOrg &SternoClavicularAxialRotation=...BodyModel.Interface.Left.SternoClavicularAxialRotation;
    AnyKinMeasureOrg &GlenohumeralFlexion = ...BodyModel.Interface.Left.GlenohumeralFlexion;
    AnyKinMeasureOrg &GlenohumeralExternalRotation = ...BodyModel.Interface.Left.GlenohumeralExternalRotation;
    AnyKinMeasureOrg &GlenohumeralAbduction = ...BodyModel.Interface.Left.GlenohumeralAbduction;
    AnyKinMeasureOrg &ElbowFlexion = ...BodyModel.Interface.Left.ElbowFlexion;
    AnyKinMeasureOrg &ElbowPronation = ...BodyModel.Interface.Left.ElbowPronation;
    AnyKinMeasureOrg &WristFlexion = ...BodyModel.Interface.Left.WristFlexion;
    AnyKinMeasureOrg &WristAbduction = ...BodyModel.Interface.Left.WristAbduction;
    Reaction.Type={Off,Off,Off,Off,Off,Off,Off,Off,Off,Off};
  };
  #endif


  #if BM_ARM_RIGHT == ON
  AnyKinDriver JntDriverRightArm = {
    AnyFunInterpol InterpolatedData = {
      Type  = iffun(gtfun(.FileReader.Length0, 1), round(Obj2Num(&Bspline)) , round(Obj2Num(&ConstantValue)));
      BsplineOrder = min({4,.FileReader.Length0});
      AnyInt ValidData = andfun( gteqfun(Main.Studies.InverseDynamicStudy.tArray[0], .FileReader.T[0]-1e-13),
                                 lteqfun(Main.Studies.InverseDynamicStudy.tArray[0], .FileReader.T[NumElemOf(.FileReader.T)-1]+1e-13));
      #if  ANYBODY_V1 >= 6 & ANYBODY_V2 >= 1
      Data = iffun({ValidData},.FileReader.Data', .FileReader.Data0')';
      T = iffun({ValidData}, .FileReader.T, .FileReader.T0);
      #else
      Data = .FileReader.Data;
      T = .FileReader.T;
      #endif
    };
    AnyInputFile FileReader = {
      FileName = TEMP_PATH + "/" + MOCAP_JOINT_ANGLE_FILE_PREFIX + MOCAP_OUTPUT_FILENAME_PREFIX + Main.ModelSetup.TrialSpecificData.TrialFileName + "-euler-rightarm.txt";
      FileErrorContinueOnOff = On;
      #if ANYBODY_V1 >= 6 & ANYBODY_V2 >= 1
      ReloadOnOff = On;
      SuppressWarningsOnOff = On;
      AnyInt Length0 = Main.Studies.KinematicStudy.nStep;
      T0 = Main.Studies.KinematicStudy.tArray;
       Data0 =  ZEROS(.nDim, Length0 );
      #endif
    };
    AnyKinMeasureOrg &SternoClavicularProtraction=...BodyModel.Interface.Right.SternoClavicularProtraction;
    AnyKinMeasureOrg &SternoClavicularElevation=...BodyModel.Interface.Right.SternoClavicularElevation;
    AnyKinMeasureOrg &SternoClavicularAxialRotation=...BodyModel.Interface.Right.SternoClavicularAxialRotation;

    AnyKinMeasureOrg &GlenohumeralFlexion = ...BodyModel.Interface.Right.GlenohumeralFlexion;
    AnyKinMeasureOrg &GlenohumeralExternalRotation = ...BodyModel.Interface.Right.GlenohumeralExternalRotation;
    AnyKinMeasureOrg &GlenohumeralAbduction = ...BodyModel.Interface.Right.GlenohumeralAbduction;
    AnyKinMeasureOrg &ElbowFlexion = ...BodyModel.Interface.Right.ElbowFlexion;
    AnyKinMeasureOrg &ElbowPronation = ...BodyModel.Interface.Right.ElbowPronation;
    AnyKinMeasureOrg &WristFlexion = ...BodyModel.Interface.Right.WristFlexion;
    AnyKinMeasureOrg &WristAbduction = ...BodyModel.Interface.Right.WristAbduction;
    Reaction.Type={Off,Off,Off,Off,Off,Off,Off,Off,Off,Off};
  };
  #endif

 #endif
};
