 Kinematics.PosAnalysisOnlyOnOff = On;
 InitialConditions.PosAnalysisOnlyOnOff = On;
 InitialConditions.KinematicTol=1e-6;
 Kinematics.KinematicTol=1e-6;

 #if ANYBODY_V1 >= 6 & ANYBODY_V2 >= 1
 Kinematics.Solver = &Kinematics.SolverOptions.KinSolOverDet1;
 InitialConditions.Solver = Kinematics.Solver;
 #else
 Kinematics.SolverType = KinSolOverDeterminate;
 InitialConditions.SolverType = Kinematics.SolverType;
 #endif


Kinematics.PreOperation =
{
  AnyOperation &SetView = Main.ModelSetup.ModelViews.SetViewMacros.KinematicView;
};
