ModelSetup = {
  // The folder Lab/Subject/TrialSpecificData folders are
  // created using class templates. This ensures that any required
  // variables get a default value if they are not specified
  // by the user.

 CreateTrialFolder TrialSpecificData = {
     #include "<MOCAP_TRIAL_SPECIFIC_DATA>"
 };

 CreateSubjectFolder SubjectSpecificData = {
   #include "<MOCAP_SUBJECT_SPECIFIC_DATA>"
 };

 CreateLabFolder LabSpecificData = {
   #include "<MOCAP_LAB_SPECIFIC_DATA>"
 };

 // This file checks if all the defines statements
 // are made correctly.
 #include "CheckAnyMocapConfiguration.any"


 Main = {
    #include "<BODY_MODEL_CONFIG_FILE>"
 };

 // This is the C3D file used for the analysis
 AnyInputC3D C3DFileData =  {};
 #include "<MOCAP_C3DSETTINGS>"

 AnyFolder MocapExtraDrivers = {
   #include "<MOCAP_EXTRA_DRIVERS_FILE>"
 };

 AnyFolder MocapDrivers = {
   #include "<MOCAP_MARKER_PROTOCOL_FILE>"
 };


 // Study for saving a loading the parameters from calibration trials
 //(dynamic or standing refereces)
 #include "SaveLoadParameters.any"


 AnyFolder ParameterIdentification = { };

 #include "ModelViews.any"


  //markers adds macros automatically into this folder
 AnyFolder Macros =  {
    AnyOperationMacro SaveOutputToHDF = {
       MacroStr = { "classoperation Main.Studies.KinematicStudy.Output" + strquote("Save data") +
                    "--type= " + strquote("Deep") +
                    "--file= " + strquote(ANYBODY_PATH_OUTPUT + "/" + MOCAP_TEST_FILENAME_PREFIX +  MOCAP_OUTPUT_FILENAME_PREFIX +
                    Main.ModelSetup.TrialSpecificData.TrialFileName + "_KinematicStudy.anydata.h5"),

                    "classoperation Main.Studies.InverseDynamicStudy.Output" + strquote("Save data") +
                    "--type= " + strquote("Deep") +
                    "--file= " + strquote(ANYBODY_PATH_OUTPUT + "/" + MOCAP_TEST_FILENAME_PREFIX  +  MOCAP_OUTPUT_FILENAME_PREFIX +
                    Main.ModelSetup.TrialSpecificData.TrialFileName + "_InverseDynamicStudy.anydata.h5")};
    };
    AnyOperationMacro LoadOutputFromHDF = {
       MacroStr = { "classoperation Main.Studies.KinematicStudy.Output" + strquote("Load data") +
                    "--file= " + strquote(ANYBODY_PATH_OUTPUT + "/" + MOCAP_TEST_FILENAME_PREFIX +  MOCAP_OUTPUT_FILENAME_PREFIX +
                    Main.ModelSetup.TrialSpecificData.TrialFileName + "_KinematicStudy.anydata.h5"),

                    "classoperation Main.Studies.InverseDynamicStudy.Output" + strquote("Load data") +
                    "--file= " + strquote(ANYBODY_PATH_OUTPUT + "/" + MOCAP_TEST_FILENAME_PREFIX +  MOCAP_OUTPUT_FILENAME_PREFIX +
                    Main.ModelSetup.TrialSpecificData.TrialFileName + "_InverseDynamicStudy.anydata.h5")};
    };

};

};


AnyFolder ModelSetup = {};
ModelSetup =
{
  AnyFolder Views = {};
};


// Fixes for missing features and structures in AMMR1.6
// This will monkeypatch the AMMR if AnyMocap is used with
// AMMR version 1.6
#if AMMR_VERSION_MAJOR < 2
// Pre AMMR2
// Create a stub for Main.HumanModel.AnthroDataSubject
Main.HumanModel= {
   /// This folder is create by the AnyMocapModel, so the HumanModel
   /// has the same structure as AMMR version >=2
   ///
   /// It just links to the AnyMan file included under
   /// HumanModel.Scaling.Scaling to where the AnyMan file was previously
   /// located
   AnyFolder AnthroDataSubject = {

     AnyVar BMI = Main.HumanModel.Scaling.Scaling.BMI;
     AnyVar FatPercent = Main.HumanModel.Scaling.Scaling.FatPercent;
     AnyFolder &AntroData = Main.HumanModel.Scaling.Scaling.AnthroData;
     AnyFolder &AnthroSegmentLengths= Main.HumanModel.Scaling.Scaling.AnthroSegmentLengths;
   };
};

  #if BM_ARM_RIGHT == ON
  Main.HumanModel.BodyModel.Right.ShoulderArm.Seg.Clavicula =
  {
    AnyRefNode& AnatomicalFrame = ScalingNode;
    AnyFunTransform3D& GeomScale = Scale;
  };
  #endif
  #if BM_ARM_LEFT == ON
  Main.HumanModel.BodyModel.Left.ShoulderArm.Seg.Clavicula =
  {
    AnyRefNode& AnatomicalFrame = ScalingNode;
    AnyFunTransform3D& GeomScale = Scale;
  };
  #endif

#endif
