Main = {

  AnyOperationMacro RunParameterIdentification  =
  {
  MacroStr = {"operation Main.ModelSetup.Views.SetViewMacros.KinematicView",
              "run",
              "operation Main.Studies.ParameterIdentification.ParameterOptimization",
              "run",
              "operation Main.ModelSetup.Macros.Save_parameters",
              "run"};
  };

// The above is a HACK_WORKAROUND since ParameterOptimization can't be referenced
// in a AnyOperationSequence without triggering a bug
//  AnyOperationSequence RunParameterIdentification =
//  {
//    AnyOperationSequence ParameterIdentification =
//    {
//      AnyOperationDummy placeholder_operation= {};
//    };
//    AnyOperationSequence SaveParameters =
//    {
//      AnyOperationDummy placeholder_operation= {};
//    };
//  };

  AnyOperationSequence RunAnalysis= {

    AnyOperationSequence LoadParameters =
    {
      AnyOperationDummy placeholder_operation= {};
    };

    AnyOperationSequence KinematicAnalysis =
    {
      AnyOperation &SetKinematicView = Main.ModelSetup.Views.SetViewMacros.KinematicView;
      AnyOperation &RunKinematics = Main.Studies.KinematicStudy.Kinematics;
    };

    AnyOperationSequence InverseDynamics =
    {
      AnyOperation &SetInverseDynamicView = Main.ModelSetup.Views.SetViewMacros.InverseDynamicView;

      AnyOperationMacro UpdateValues= { MacroStr = {"classoperation Main"+ strquote("Update Values") };  };
      AnyOperation &reset = Main.Studies.InverseDynamicStudy.InitialConditions.PreOperation;

      #if BM_LEG_MUSCLES_BOTH == CONST_MUSCLES_3E_HILL
        AnyOperationSequence &MuscleCalibration = Main.HumanModel.Calibration.CalibrationSequence;
      #endif

      AnyOperation &RunInverseDynamics = Main.Studies.InverseDynamicStudy.InverseDynamics;
    };
    AnyOperationSequence SaveOuput =
    {
      AnyOperationDummy do = {};
    };

  };
};
