#ifndef INCLUDEFILES_ANY
#path BASE_MODEL_PATH "Model/"
#path PROJECT_PATH "."
#endif

Main = {
  AnyProject Project = {
//    #include "Subjects/TrialSelector.any"
    Tasks = {
    #ifdef INCLUDEFILES_ANY

    #endif

    };
  };
};
