//define = [
//  {'BM_LEG_MODEL':'_LEG_MODEL_TLEM1_'},
//  {'BM_LEG_MODEL':'_LEG_MODEL_TLEM2_'},
//]
//ignore_errors = ['FileReader.FileName']


#ifndef TEST_NAME
#path ANYBODY_PATH_AMMR "<ANYBODY_PATH_MYFILES>\AMMRs\ammr\"
#endif

#path TEMP_PATH "Output"
#path MOCAP_PATH_MAINFILEDIR "..\Examples\BVH\Trials\BVH01"
#path MOCAP_PATH_MAINFILE "<MOCAP_PATH_MAINFILEDIR>/Main.any"
#define MOCAP_NAME_MAINFILEDIR "BVH01"

#include "libdef.any"


#ifdef TEST_NAME
#define  MOCAP_TEST_FILENAME_PREFIX  TEST_NAME + "_"
#else
#define  MOCAP_TEST_FILENAME_PREFIX  "GUI_"
#define BM_LEG_MODEL _LEG_MODEL_TLEM1_
#endif


//// Run Analysis with a reduced number of time steps
//// to make test go faster.
//#define N_STEP_PARAM_OPT 10
//#define N_STEP_KINEMATICS 197
//#define N_STEP 30


#include "<MOCAP_PATH_MAINFILE>"

Main =
{
  AnyOperationSequence  RunTest =
  {
    AnyOperation& BVH_preprocess = Main.BVH_PreProcess;
    AnyOperation& RunAnalysis = Main.RunAnalysis;
  };
Studies.ParameterIdentification = {
AnyDesVar Dummy = {Val = 0;};
};


};
