//# Defintions for the python test framwork
//define = [
//  {'TLEM_VERSION':'"2.0"'},
//  {'TLEM_VERSION':'"1.1"'},
//]
//ignore_errors = ['FileReader.FileName']


#path TEMP_PATH "Output"
#path MOCAP_PATH_MAINFILEDIR "../Examples/Plug-in-gait-LowerExtremity"
#path MOCAP_PATH_MAINFILE "<MOCAP_PATH_MAINFILEDIR>/Main.any"
#define MOCAP_NAME_MAINFILEDIR "Plug-in-gait-LowerExtremity"


#ifdef TEST_NAME
#define  MOCAP_TEST_FILENAME_PREFIX  TEST_NAME + "_"
#else
#define  MOCAP_TEST_FILENAME_PREFIX  "GUI_"
#path AMMR_PATH "../ammr"
#define TLEM_VERSION "1.1"
#endif


// Run Analysis with a reduced number of time steps
// to make test go faster.
#define N_STEP_PARAM_OPT 10
#define N_STEP_KINEMATICS 197
#define N_STEP 30

#include "libdef.any"

#ifndef AMMR_VERSION
#define MOCAP_OUTPUT_FILENAME_PREFIX "AMMR1_"
#else
#define MOCAP_OUTPUT_FILENAME_PREFIX "AMMR2_"
#endif

#include "<MOCAP_PATH_MAINFILE>"

Main =
{
  AnyOperationSequence  RunTest =
  {
    AnyOperation& ParameterId =  Main.RunParameterIdentification;
    AnyOperation& RunAnalysis = Main.RunAnalysis;
  };


};
