//# Defintions for the python test framwork
//define = [
//  {'TLEM_VERSION':'"2.0"'},
//  {'TLEM_VERSION':'"1.1"'},
//]
//ignore_errors = ['FileReader.FileName']


#path TEMP_PATH "../Examples/Plug-in-gait_Squat_StandingRefScaling/Output"
#path MOCAP_PATH_MAINFILEDIR "../Examples/Plug-in-gait_Squat_StandingRefScaling/Trials/FlywheelSquat_1/"
#path MOCAP_PATH_MAINFILE "<MOCAP_PATH_MAINFILEDIR>/Main.any"
#define MOCAP_NAME_MAINFILEDIR "FlywheelSquat_1"

#ifdef TEST_NAME
#define  MOCAP_TEST_FILENAME_PREFIX  TEST_NAME + "_"
#else
#define  MOCAP_TEST_FILENAME_PREFIX  "GUI_"
#path AMMR_PATH "../ammr"
#define TLEM_VERSION "1.1"
#endif

#ifndef AMMR_VERSION
#define MOCAP_OUTPUT_FILENAME_PREFIX "AMMR1_"
#else
#define MOCAP_OUTPUT_FILENAME_PREFIX "AMMR2_"
#endif


#include "libdef.any"


// Run Analysis with a reduced number of time steps
// to make test go faster.
#define N_STEP 30


#include "<MOCAP_PATH_MAINFILE>"

Main =
{

  AnyOperation& RunTest = Main.RunParameterIdentification;

};
